x := 2
n := 3
sin(30 °) = 0.5
y := (sqrt(x^3 + n) + cos(|n*x - 1|)^2)/(cos(π/4*(x + n))*nthroot(x^5 + sin(x) + n, 4))
y = -1.96255
log(100, 10) = 2
# ЗАДАНИЕ 2
log(8, 2) = 3
x := 7
y := 10
z := -3
p := if(x > y, sin(x) + 3*|y| - z^2, (y + 3)*ln(|x + 1|)/sqrt(z^2 + 1))
p = 8.5485
q := if((x > y) and (x < 1), cos(x) + 2*|y + 1| - z, (x*y + 3)/sqrt(y^2 + 5))
q = 7.12407
w := if((x < y) or (y ≥ 10), x^2 + 2*(y*x + 1) - z, (x^-3*y^2 + 3)*sqrt(z^2 + 7))
w = 194
n = 3
f(x) := (x^2 - n*x + sin(x))*sqrt(|x - cos(n*x)|)
x := -2, -1.6 .. 2
x = [-2; -1.6; -1.2; -0.8; -0.4; 0; 0.4; 0.8; 1.2; 1.6; 2]
f(x) = [15.6407; 8.26243; 2.26215; 0.581154; 0.847445; 0; -0.126223; -1.29279; -1.77811; -1.52552; -1.11221]
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iter1 := 0 .. 2
# ЗАДАНИЕ 4
A := runif(3, -9, 9)
B := runif(3, -9, 9)
C := runif(3, -9, 9)
transpose(A) = [-8.97717, -5.52019, 1.53011]
transpose(B) = [-2.69445, 5.81108, -5.86568]
transpose(C) = [3.78892, -3.52825, -7.3546]
s := sum(A[iter1]*B[iter1], iter1)
s := A*B
V := B×C
w := (A×B)*C
s = -16.8648
w = 782.387
s = -16.8648
V = [-63.4337; -42.0412; -12.511]
B_r := -B
W := [(A[1]*B[2]) - (A[2]*B[1]); (A[2]*B[0]) - (A[0]*B[2]); (A[0]*B[1]) - (A[1]*B[0])]
V := [(B[1]*C[2]) - (B[2]*C[1]); (B[2]*C[0]) - (B[0]*C[2]); (B[0]*C[1]) - (B[1]*C[0])]
B_r = [2.69445; -5.81108; 5.86568]
t := runif(4, -4, 0)
lengthA := sqrt(A[0]^2 + A[1]^2 + A[2]^2)
transpose(t) = [-3.24289, -3.38591, -0.458504, -3.21731]
W = [23.488; -56.78; -67.0409]
lengthB := sqrt(B[0]^2 + B[1]^2 + B[2]^2)
V = [-63.4337; -42.0412; -12.511]
lengthC := sqrt(C[0]^2 + C[1]^2 + C[2]^2)
w := sum(W[iter1]*C[iter1], iter1) = 782.387
arr := [lengthA; lengthB; lengthC]
arr = [10.6491; 8.68533; 8.99414]
Max := max(arr)
Max = 10.6491  # Это С
iter1 := 0, 1 .. 10
iter2 := 0, 1 .. 10
M[iter1, iter2] := -10 + floor(rnd(20))  # 1 -1
M[iter1, iter2] := -10 + round(rnd(20), 3)  # 9 - 3
it1 := 1 .. 9
it2 := 1 .. 3
sum(sum(M[it1, it2], it2), it1) = 9.574
M = [
    -9.975, -6.134, 1.7, -2.994, 6.457, -6.517, 4.21, -3.92, -8.172, -7.054, 9.77;
    -7.618, -9.822, 0.633, 2.035, -6.675, -0.984, -8.859, 5.666, 0.398, 7.519, 9.118;
    0.787, -0.759, 7.244, 5.593, 9.936, 2.23, -4.676, 6.802, -2.483, 3.544, -9.824;
    -4.482, 1.758, 6.752, -0.301, 4.875, -0.84, 4.888, 1.981, 4.7, 1.448, -6.969;
    -1.497, 0.342, 5.031, -6.62, -0.162, 3.995, -7.05, -7.168, 3.858, -1.469, 9.332;
    -6.935, 6.433, -6.173, 6.344, -6.889, 4.64, -4.408, 3.645, 4.438, -7.539, 6.693;
    0.34, -1.476, 8.987, 0.991, -0.566, 6.939, -0.878, 9.659, 4.784, -6.08, 6.789;
    0.018, -9.45, 1.451, 0.626, 6.861, 3.152, 6.843, -7.801, -3.718, -4.278, -7.194;
    6.692, 2.005, -4.946, -9.968, 6.125, -5.789, 1.064, -7.724, 5.044, 0.869, -1.266;
    3.924, -1.266, 1.557, 2.573, 0.083, 3.915, -6.201, -6.432, -0.851, -8.05, -8.112;
    8.63, 7.892, -5.454, -1.786, 2.561, -0.968, 1.957, 7.096, 2.496, 1.315, -6.314
]
macbookpro := 220, 220 + 10 .. 380 = [220; 230; 240; 250; 260; 270; 280; 290; 300; 310; 320; 330; 340; 350; 360; 370; 380]
# отобразить в виде матрицы
sum(sum(M[iter1, iter2], iter2), iter1) = 6.497
Mpos[iter1, iter2] := if(M[iter1, iter2] > 0, M[iter1, iter2], 0)
sum(sum(Mpos[iter1, iter2], iter2), iter1) = 288.033  # Сумма положительных элементов матрицы
Mneg[iter1, iter2] := if(M[iter1, iter2] < 0, M[iter1, iter2], 0)
sum(sum(Mneg[iter1, iter2], iter2), iter1) = -281.536  # Сумма отрицательных элементов матрицы
X := M[:, 0]
Y := transpose(transpose(M)[:, 10])
Y = [8.63, 7.892, -5.454, -1.786, 2.561, -0.968, 1.957, 7.096, 2.496, 1.315, -6.314]
X = [-9.975; -7.618; 0.787; -4.482; -1.497; -6.935; 0.34; 0.018; 6.692; 3.924; 8.63]
X*Y = [
    -86.0842, -78.7227, 54.4036, 17.8153, -25.546, 9.6558, -19.5211, -70.7826, -24.8976, -13.1171, 62.9821;
    -65.7433, -60.1213, 41.5486, 13.6057, -19.5097, 7.37422, -14.9084, -54.0573, -19.0145, -10.0177, 48.1001;
    6.79181, 6.211, -4.2923, -1.40558, 2.01551, -0.761816, 1.54016, 5.58455, 1.96435, 1.03491, -4.96912;
    -38.6797, -35.3719, 24.4448, 8.00485, -11.4784, 4.33858, -8.77127, -31.8043, -11.1871, -5.89383, 28.2993;
    -12.9191, -11.8143, 8.16464, 2.67364, -3.83382, 1.4491, -2.92963, -10.6227, -3.73651, -1.96855, 9.45206;
    -59.849, -54.731, 37.8235, 12.3859, -17.7605, 6.71308, -13.5718, -49.2108, -17.3098, -9.11952, 43.7876;
    2.9342, 2.68328, -1.85436, -0.60724, 0.87074, -0.32912, 0.66538, 2.41264, 0.84864, 0.4471, -2.14676;
    0.15534, 0.142056, -0.098172, -0.032148, 0.046098, -0.017424, 0.035226, 0.127728, 0.044928, 0.02367, -0.113652;
    57.752, 52.8133, -36.4982, -11.9519, 17.1382, -6.47786, 13.0962, 47.4864, 16.7032, 8.79998, -42.2533;
    33.8641, 30.9682, -21.4015, -7.00826, 10.0494, -3.79843, 7.67927, 27.8447, 9.7943, 5.16006, -24.7761;
    74.4769, 68.108, -47.068, -15.4132, 22.1014, -8.35384, 16.8889, 61.2385, 21.5405, 11.3484, -54.4898
]
# ЗАДАНИЕ 5
x5 := -3*π .. 3*π
func5(x5) := e^(-(|x5|/3))*cos(x5)
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# ЗАДАНИЕ 6
x6 := -9, -8.75 .. 9
func6(x6) := if(x6 < 0, e^x6*x6^3, e^(-x6)*x6^3)
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ind := 0, 1 .. 16
# ЗАДАНИЕ 7
dif := π/4
x7start := -2*π
x7[ind] := x7start + dif*ind
g7(x7) := sqrt(|x7|)*sin(x7)
x7 = [-6.28319; -5.49779; -4.71239; -3.92699; -3.14159; -2.35619; -1.5708; -0.785398; 0; 0.785398; 1.5708; 2.35619; 3.14159; 3.92699; 4.71239; 5.49779; 6.28319]
g7(x7) = [0; 2.8164; 3.983; 2.8164; 0; -2.8164; -3.983; -2.8164; 0; 2.8164; 3.983; 2.8164; 0; -2.8164; -3.983; -2.8164; 0]
Y := g7(x7)
X := x7
WRITEPRN("X.txt") := X
WRITEPRN("Y.txt") := g7(x7)
XX := READPRN("X.txt")
YY := READPRN("Y.txt")
YY = [0; 2.816; 3.983; 2.816; 0; -2.816; -3.983; -2.816; 0; 2.816; 3.983; 2.816; 0; -2.816; -3.983; -2.816; 0]
XX = [-6.283; -5.498; -4.712; -3.927; -3.142; -2.356; -1.571; -0.7854; 0; 0.7854; 1.571; 2.356; 3.142; 3.927; 4.712; 5.498; 6.283]
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# ЗАДАНИЕ 8
x8 := -3 .. 3
q8(x8) := e^(-x8^2)
q82(x8) := d/dx8(q8(x8))
q822(x8) := d^3/dx8^3(q8(x8))
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# ЗАДАНИЕ 9
i9 := 0 .. 42
j9 := 0 .. 42
x9[i9] := -15 + (30/42)*i9
y9[j9] := -15 + (30/42)*j9
func9(x91, y91) := sin(sqrt(x91^2 + y91^2))/sqrt(x91^2 + y91^2)
graph[i9, j9] := func9(x9[i9], y9[j9])
# [component: inputs graph]
# ЗАДАНИЕ 10
x10 := -5, -4 .. 5
func12(x) := 3*x - 9
func10(x10) := x10^2 + (x10 - 2)*sin(x10) - 5
x := -2
root(func10(x), x) = -1.32936
root(func12(x), x) = 3
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func10(-1.32936) = -8.23152e-6
func10(2.19966) = -3.15517e-5
x := 1
# ЗАДАНИЕ 11
root(3*x - 9, x) = 3
x11 := -4 .. 4
func11(x11) := x11^2 + x11*sin(2*x11) - (x11 - 5)*cos(x11)
root(func11(x11), x11) = [-2.97354; -2.97354; -1.93283; -2.97354; -1.93283; -1.93283; -2.97354; -1.93283; -1.93283]
func11(-2.9735) = -0.00033958
func11(-1.932) = 0.00542766
# ЗАДАНИЕ 12
n12 := 1
func12(x12) := x12^3 + (4 - n12)*x12^2 + (3 - 4*n12)*x12 - 3*n12
Vc12 := [3*n12; 3 - 4*n; 4 - n; 1]
X12 := polyroots(Vc12)
X12 = [-3.67282; 0.351939; 2.32088]
# ЗАДАНИЕ 13
M13 := [n, n + 1, n + 2; n - 3, n - 2, n; n - 1, n, n + 1]
M113 := [6*n + 8; 6*n - 7; 6*n + 2]
[ans113; ans213; ans313] := M13^-1*M113
x13 := 0
ans113 = 1
y13 := 0
ans213 = 2
z13 := 0
ans313 = 3
Given
n*x13 + (n + 1)*y13 + (n + 2)*z13 == 6*n + 8
(n - 3)*x13 + (n - 2)*y13 + z13*n == 6*n - 7
(n - 1)*x13 + n*y13 + (n + 1)*z13 == 6*n + 2
Find(x13, y13, z13) → [1; 2; 3]
# ЗАДАНИЕ 14
x14 := 0
y14 := 0
Given
(x14^2)/81 + (y14^2)/16 - 1 == (x14 - 9)^2 + (y14 - 2^2) - 25
Find(x14, y14) → [9*sqrt(2321)/80 + 729/80, 729/80 - 9*sqrt(2321)/80; 0, 0]
# ЗАДАНИЕ 15
func15(x15) := x15*sin(x15)
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Minimum
x15 := 5
x15 := Minimize(func15, x15)
x15 = 4.91318
func15(x15) = -4.81447
func15(10) = -5.44021
