X := transpose([-3, 0, 3, -3, -2, -2, 2, 2, 3])
Y := transpose([0, 4, 0, 0, 0, -4, -4, 0, 0])
Xmin := min(X) = -3
Ymin := min(Y) = -4
Xmax := max(X) = 3
Ymax := max(Y) = 4
D := [Xmin, Ymax, Xmax, Ymin]
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Xl := Xmin
Yh := Ymax
Xh := Xmax
Yl := Ymin
i := 0 .. 8
Xwl := 100
Ywl := 200
Xwh := 400
Ywh := 500
Xw(i) := Xwl + (Xwh - Xwl)*(X[i] - Xl)/(Xh - Xl)
# ПЕРЕДЕЛАТЬ С ПОМОЩЬЮ МАТРИЦ
# файлек в папке
Yw(i) := Ywh - (Ywh - Ywl)*(Y[i] - Yl)/(Yh - Yl)
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# ЗАДАНИЕ 2
f(x) := sin(π*x)*sqrt(|x|)
x1 := -6
x_d := 0.1
x2 := 6
xLW := 100
xHW := 800  # Углы отображения
yLW := 200
yHW := 900
N := round((x2 - x1)/x_d)
N = 120
i := 0 .. N
X[i] := x1 + i*x_d  # значения функции в мировой системе координат
Y[i] := f(X[i])
Z[i] := 1
xL := min(X) = -6
xH := max(X) = 6  # левый верхний и правый нижний угол
yH := max(Y) = 2.34521
yL := min(Y) = -2.34521
Ms := stack(transpose(X), transpose(Y), transpose(Z))  # матрица точек графика в мировой системе координат
x_dW := xHW - xLW = 700
x_d := xH - xL = 12
y_dW := yHW - yLW = 700
y_d := yH - yL = 4.69042
kx := x_dW/x_d = 58.3333
yHW = 900
ky := y_dW/y_d = 149.241
TSW := [kx, 0, xLW - kx*xL; 0, -ky, yHW + ky*yL; 0, 0, 1] = [58.3333, 0, 450; 0, -149.241, 550; 0, 0, 1]
MW := TSW*Ms
XW := transpose(MW)[:, 0]
yHW = 900
YW := transpose(MW)[:, 1]
YW = [
    550; 437.98; 338.739; 261.742; 214.118; 200; 220.17; 272.04; 349.965; 445.851
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]
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