X := transpose([4, 4, 6, 6, 4])
Y := transpose([2, 8, 7, 3, 2])
x0 := 4
x1 := 4
x2 := 6
x3 := 6
y0 := 2
y1 := 8
y2 := 7
y3 := 3
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P := [x0, x1, x2, x3, x0; y0, y1, y2, y3, y0; 1, 1, 1, 1, 1]
k := (y2 - y1)/(x2 - x1) = -0.5
# решение уравнений прямой
[ADa; ADb] := line([x3; x0], [y3; y0]) = [0; 0.5]
[BCa; BCb] := line([x1; x2], [y1; y2]) = [10; -0.5]
line_eq1(x) := ADa + ADb*x
line_eq2(x) := BCa + BCb*x
Px := (BCa - ADa)/(ADb - BCb) = 10
Py := line_eq1(Px) = 5
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Ro(a) := [cos(a), -sin(a), 0; sin(a), cos(a), 0; 0, 0, 1]
Ts(dx, dy) := [1, 0, -dx; 0, 1, -dy; 0, 0, 1]
To(dx, dy) := Ts(-dx, -dy)
a := -90
a_rad := a*π/180
P1 := Ts(Px, Py)*P
P1 = [-6, -6, -4, -4, -6; -3, 3, 2, -2, -3; 1, 1, 1, 1, 1]
X1 := transpose(P1)[:, 0]
transpose(X1) = [-6, -6, -4, -4, -6]
Y1 := transpose(P1)[:, 1]
transpose(Y1) = [-3, 3, 2, -2, -3]
# смещение системы координат
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P2 := Ro(a_rad)*P1 = [-3, 3, 2, -2, -3; 6, 6, 4, 4, 6; 1, 1, 1, 1, 1]
X2 := transpose(P2)[:, 0] = [-3; 3; 2; -2; -3]
Y2 := transpose(P2)[:, 1] = [6; 6; 4; 4; 6]
# поворачиваем фигуру
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# смещение системы координат в исходное положение
P3 := Ts(-Px, -Py)*P2 = [7, 13, 12, 8, 7; 11, 11, 9, 9, 11; 1, 1, 1, 1, 1]
X3 := transpose(P3)[:, 0] = [7; 13; 12; 8; 7]
Y3 := transpose(P3)[:, 1] = [11; 11; 9; 9; 11]
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