A := transpose([5, 0, 0, 1])
B := transpose([0, 0, 0, 1])  # координаты вершин пирамиды
C := transpose([0, 5, 0, 1])
D := transpose([0, 0, 10, 1])
rv := 10
fi_vg := 340
theta_vg := 45  # координаты камеры в сфер.системе координат
fi_v := fi_vg*π/180  # theta - угол по оси з до точки наблюдения
theta_v := theta_vg*π/180  # fi - угол по оси X до точки наблюдения
xLW := 200
xHW := 700
yLW := 100
yHW := 500
# матрица координат
PIR := augment(A, B, C, D) = [5, 0, 0, 0; 0, 0, 5, 0; 0, 0, 0, 10; 1, 1, 1, 1]
# видовая система координат
K_view := [
    -sin(fi_v), cos(fi_v), 0, 0;
    -cos(theta_v)*cos(fi_v), -cos(theta_v)*sin(fi_v), sin(theta_v), 0;
    -sin(theta_v)*cos(fi_v), -sin(theta_v)*sin(fi_v), -cos(theta_v), rv;
    0, 0, 0, 1
]
PIR_V := K_view*PIR = [1.7101, 0, 4.69846, 0; -3.32232, 0, 1.20922, 7.07107; 6.67768, 10, 11.2092, 2.92893; 1, 1, 1, 1]
# координаты вершин пирамиоды в видовой системе координат
XV := transpose(PIR_V)[:, 0] = [1.7101; 0; 4.69846; 0]
YV := transpose(PIR_V)[:, 1] = [-3.32232; 0; 1.20922; 7.07107]
IV := transpose(PIR_V)[:, 3] = [1; 1; 1; 1]
pXY := stack(transpose(XV), transpose(YV), transpose(IV)) = [1.7101, 0, 4.69846, 0; -3.32232, 0, 1.20922, 7.07107; 1, 1, 1, 1]
# координаты проекции вершин на картинную плоскость, XV YV
# левый верхний угол габаритной области проекции пирамиды
xL := min(XV) = 0
yH := max(YV) = 7.07107  # картинная плоскость - перпендикулярна наблюдателю
# правый нижний
xH := max(XV) = 4.69846
yL := min(YV) = -3.32232
d_xW := xHW - xLW = 500
d_x := xH - xL = 4.69846
d_yW := yHW - yLW = 400
d_y := yH - yL = 10.3934  # параметры для матрицы пересчета
kx := d_xW/d_x = 106.418
ky := d_yW/d_y = 38.486
TSW := [kx, 0, xLW - kx*xL; 0, -ky, yHW + ky*yL; 0, 0, 1]  # матрица перессчета
M1W := TSW*pXY
MW := vectorize(round(M1W))
# оконные координаты вершин пирамиды
[xa, xb, xc, xd; ya, yb, yc, yd; q, q, q, q] := MW
R_C := [rv*sin(theta_v)*cos(fi_v); rv*sin(theta_v)*sin(fi_v); rv*cos(theta_v)] = [6.64463; -2.41845; 7.07107]
# координаты вектора определяющего положение камеры
AC := [C[0]; C[1]; C[2]] - [A[0]; A[1]; A[2]] = [-5; 5; 0]  # координаты векторов ac ad
AD := [D[0]; D[1]; D[2]] - [A[0]; A[1]; A[2]] = [-5; 0; 10]
N_ADC := AC×AD
N_ADB := transpose([0, -1, 0])  # (вектор, перпендикулярный данной плоскости)
N_BDC := transpose([-1, 0, 0])  # векторы внешних нормалей к граням
N_ABC := transpose([0, 0, -1])
# ОПРЕДЕЛЕНИЕ ВИДИМОСТИ ГРАНЕЙ
# если скалярное произведение больше нуля - грань смотрит на камеру -> она видима
q1 := R_C*N_ADC  # произведение векторов
s1 := if(q1 ≥ 0, "грань adc видима", "грань adc невидима") = "грань adc видима"
q2 := R_C*N_ADB
s2 := if(q2 ≥ 0, "грань adb видима", "грань adb невидима") = "грань adb видима"
q3 := R_C*N_BDC
s3 := if(q3 ≥ 0, "грань bdc видима", "грань bdc невидима") = "грань bdc невидима"
q4 := R_C*N_ABC
s4 := if(q4 ≥ 0, "грань abc видима", "грань abc невидима") = "грань abc невидима"
X := transpose([xa, xd, xc, xa, xb, xd])
Y := transpose([ya, yd, yc, ya, yb, yd])
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# удаление невидимых граней
# БЕЗ УДАЛЕНИЯ НЕВИДИМЫХ ГРАНЕЙ
filename := "Piramida.txt"
filename1 := "Camera.txt"
PIR1 := READFILE(filename, "delimited")
PV1 := READFILE(filename1, "delimited")
PIR1 = ["A", "B", "C", "D"; 5, 0, 0, 0; 0, 0, 5, 0; 0, 0, 0, 10; 1, 1, 1, 1]
PV1 = ["r=", 10; "fi=", 30; "theta=", 45]
PIR := submatrix(PIR1, 1, 4, 0, 3) = [5, 0, 0, 0; 0, 0, 5, 0; 0, 0, 0, 10; 1, 1, 1, 1]
PV := submatrix(PV1, 0, 2, 1, 1)
transpose(PV) = [10, 30, 45]
rv := PV[0]
fi := PV[1]/180*π
theta := PV[2]/180*π  # радианы
xLW := 200
yLW := 100
xHW := 700
yHW := 500
K_view := [
    -sin(fi), cos(fi), 0, 0;
    -cos(theta)*cos(fi), -cos(theta)*sin(fi), sin(theta), 0;
    -sin(theta)*cos(fi), -sin(theta)*sin(fi), -cos(theta), rv;
    0, 0, 0, 1
]  # область отображения графика
PIR_V := K_view*PIR
PXY := stack(transpose(transpose(PIR_V)[:, 0]), transpose(transpose(PIR_V)[:, 1]), transpose(transpose(PIR_V)[:, 3])) = [-2.5, 0, 4.33013, 0; -3.06186, 0, -1.76777, 7.07107; 1, 1, 1, 1]
xL := min(transpose(PXY)[:, 0]) = -2.5
# левый верхний угол габаритной области проекции пирамиды на плоскость
р
yH := max(transpose(PXY)[:, 1]) = 7.07107
xH := max(transpose(PXY)[:, 0]) = 4.33013
# правый нижний
yL := min(transpose(PXY)[:, 1]) = -3.06186
dxw := xHW - xLW = 500
dx := xH - xL = 6.83013
dyw := yHW - yLW = 400
# параметры для матрицы пересчета
dy := yH - yL = 10.1329
kx := dxw/dx = 73.2051
ky := dyw/dy = 39.4753
TSW := [kx, 0, xLW - kx*xL; 0, -ky, yHW + ky*yL; 0, 0, 1]
# оконные кординаты вершин пирамиды
MW := TSW*PXY
[xa, xb, xc, xd; ya, yb, yc, yd; q, q, q, q] := vectorize(round(MW))
X := transpose([xa, xb, xc, xa, xd, xb, xd, xc])
# так как не удаляем невидимые грани, то в векторах 8 значений а не 6
Y := transpose([ya, yb, yc, ya, yd, yb, yd, yc])
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# ПОСТРОЕНИЕ ПРОЕКЦИИ
PIR = [5, 0, 0, 0; 0, 0, 5, 0; 0, 0, 0, 10; 1, 1, 1, 1]  # матрица координат вершин пирамиды
PV1 = ["r=", 10; "fi=", 30; "theta=", 45]
PV := submatrix(PV1, 0, 2, 1, 1) = [10; 30; 45]
rv := PV[0]
fi := PV[1]/180*π
theta := PV[2]/180*π
angle_grad := 50  # угол между осью Z и вектором нормали к секущей плоскости
angle := angle_grad/180*π = 0.872665
N := transpose([0, sin(angle), cos(angle)]) = [0; 0.766044; 0.642788]  # вектор нормали к секущей плоскости
x0 := 0
y0 := 0
z0 := 3/4*PIR[:, 3][2] = 7.5  # координаты точки пересечения оси Z и секущей плоскости
[A; B; C] := N = [0; 0.766044; 0.642788]
D := -(A*x0 + B*y0 + C*z0) = -4.82091  # уравнение секущей плоскости
# точка пересечения p1 секущей плоскости с ребром AD
[x1; y1; z1] := submatrix(PIR1, 1, 3, 0, 0) = [5; 0; 0]
[x2; y2; z2] := submatrix(PIR1, 1, 3, 3, 3) = [0; 0; 10]
dx := x2 - x1 = -5
dy := y2 - y1 = 0
dz := z2 - z1 = 10
tad := -(A*x1 + B*y1 + C*z1 + D)/(A*dx + B*dy + C*dz) = 0.75
xad := x1 + dx*tad = 1.25
yad := y1 + dy*tad = 0  # точка пересечения p1 секущей плоскости с ребром ad
zad := z1 + dz*tad = 7.5
# точка пересечения р2 секущей плоскости с ребром cd
# вектор направления - указывает как идти от
# v1 до v2
# по оси y на 5 вниз и вверх по оси z на 10
v1 := submatrix(PIR1, 1, 3, 2, 2) = [0; 5; 0]
v2 := submatrix(PIR1, 1, 3, 3, 3) = [0; 0; 10]
dv := v2 - v1 = [0; -5; 10]
# вектор направления
# ребра
N = [0; 0.766044; 0.642788]  # уравнение плоскти
tcd := -((N*v1 + D)/(N*dv)) = 0.381377
# точка внутри
# ребра
vcd := v1 + dv*tcd = [0; 3.09312; 3.81377]
xcd := vcd[0] = 0
ycd := vcd[1] = 3.09312  # точка пересечения
zcd := vcd[2] = 3.81377
# точка пересечения  p3 секущей плоскости с ребром BD
v1 := submatrix(PIR1, 1, 3, 1, 1)
v2 := submatrix(PIR1, 1, 3, 3, 3)
dv := v2 - v1 = [0; 0; 10]  # вектор направления
tbd := -((N*v1 + D)/(N*dv)) = 0.75
vbd := v1 + dv*tbd = [0; 0; 7.5]
xbd := vbd[0] = 0
ybd := vbd[1] = 0  # точка пересечения
zbd := vbd[2] = 7.5
TR := [xad, xcd, xbd; yad, ycd, ybd; zad, zcd, zbd; 1, 1, 1] = [1.25, 0, 0; 0, 3.09312, 0; 7.5, 3.81377, 7.5; 1, 1, 1]
# матрица мировых координат точек
# p1 p2 p3
xlw := 100
ylw := 200  # область отображения
xhw := 800
yhw := 900
k_view := [
    -sin(fi), cos(fi), 0, 0;
    -cos(theta)*cos(fi), -cos(theta)*sin(fi), sin(theta), 0;
    -sin(theta)*cos(fi), -sin(theta)*sin(fi), -cos(theta), rv;
    0, 0, 0, 1
]
# матрица пересчета мировых координат в видовые
pir_v := k_view*PIR  # координаты вершин пирамиды в видовой системе
tr_v := k_view*TR  # вершины треугольника сечения
# вершины пирамиды на картинную плоскость
pxy := stack(transpose(transpose(pir_v)[:, 0]), transpose(transpose(pir_v)[:, 1]), transpose(transpose(pir_v)[:, 3])) = [-2.5, 0, 4.33013, 0; -3.06186, 0, -1.76777, 7.07107; 1, 1, 1, 1]
# координаты вершимн треугольника на картинную плоскость
trxy := stack(transpose(transpose(tr_v)[:, 0]), transpose(transpose(tr_v)[:, 1]), transpose(transpose(tr_v)[:, 3])) = [-0.625, 2.67872, 0; 4.53784, 1.60316, 5.3033; 1, 1, 1]
xl := min(transpose(pxy)[:, 0]) = -2.5
# левый верхний
yh := max(transpose(pxy)[:, 1]) = 7.07107
xh := max(transpose(pxy)[:, 0]) = 4.33013  # правый нижний
yl := min(transpose(pxy)[:, 1]) = -3.06186
dxw := xhw - xlw = 700
dx := xh - xl = 6.83013
dyw := yhw - ylw = 700
# параметры для матрицы пересчета из видовой в оконную
dy := yh - yl = 10.1329
kx := dxw/dx = 102.487
ky := dyw/dy = 69.0817
TSW := [kx, 0, xlw - kx*xl; 0, -ky, yhw + ky*yl; 0, 0, 1]  # матрица пересчета
# оконные координаты вершин пирамиды
mw := TSW*pxy
[xa, xb, xc, xd; ya, yb, yc, yd; q, q, q, q] := vectorize(round(mw))  # оконные координаты вершин пирамиды
X := transpose([xa, xb, xc, xa, xd, xb, xd, xc])
# координаты для пирамиды
Y := transpose([ya, yb, yc, ya, yd, yb, yd, yc])
trw := TSW*trxy
[xp1, xp2, xp3; yp1, yp2, yp3; q, q, q] := vectorize(round(trw))  # оконные координаты сечения
xc := transpose([xp1, xp2, xp3, xp1])
yc := transpose([yp1, yp2, yp3, yp1])
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